# Координаты фигуры в мировой системе
Xa := -2
Xb := -3
Xc := 0
Xd := 3
Xe := 2
Xf := -2
Xg := 2
Ya := -4
Yb := 0
Yc := 4
Yd := 0
Ye := -4
Yf := 0
Yg := 0
X := transpose([Xb, Xc, Xd, Xb, Xf, Xa, Xe, Xg, Xd])
Y := transpose([Yb, Yc, Yd, Yb, Yf, Ya, Ye, Yg, Yd])
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Xl := -3
Xh := 3  # По максимальным и минимальным координатам определяется размер окна
Yh := 4
Yl := -4
Xlw := 100
Ylw := 200  # Нужно отобразить в таком окне
Xhw := 400
Yhw := 500
# Ширина обсласти отображения в оконных
qXw := Xhw - Xlw = 300
# Ширина области отображения в мировых
qX := Xh - Xl = 6
# Высота области отображения в оконных
qYw := Yhw - Ylw = 300
# Высота области отображения в мировых
qY := Yh - Yl = 8
# Коэффициенты отношения оконных кординат к мировым
Kx := qXw/qX = 50
Ky := qYw/qY = 37.5
# Матрица пересчета из МСК в ОСК
Tsw := [Kx, 0, Xlw - Kx*Xl; 0, -Ky, Yhw + Ky*Yl; 0, 0, 1]
# Координаты в ОСК
[Xaw; Yaw; q] := Tsw*[Xa; Ya; 1]
[Xbw; Ybw; q] := Tsw*[Xb; Yb; 1]
[Xcw; Ycw; q] := Tsw*[Xc; Yc; 1]
[Xdw; Ydw; q] := Tsw*[Xd; Yd; 1]
[Xew; Yew; q] := Tsw*[Xe; Ye; 1]
[Xfw; Yfw; q] := Tsw*[Xf; Yf; 1]
[Xgw; Ygw; q] := Tsw*[Xg; Yg; 1]
[Xaw; Yaw; q] = [150; 500; 1]
[Xbw; Ybw; q] = [100; 350; 1]
[Xcw; Ycw; q] = [250; 200; 1]
[Xdw; Ydw; q] = [400; 350; 1]
[Xew; Yew; q] = [350; 500; 1]
[Xfw; Yfw; q] = [150; 350; 1]
[Xgw; Ygw; q] = [350; 350; 1]
Yw := -transpose([Ybw, Ycw, Ydw, Ybw, Yfw, Yaw, Yew, Ygw, Ydw])
Xw := transpose([Xbw, Xcw, Xdw, Xbw, Xfw, Xaw, Xew, Xgw, Xdw])
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