# Отобразить график
f(x) := sin(π*x)*sqrt(|x|)
# Начальная точка | Конечная точка | Шаг
x1 := -6
x2 := 6
deltaX := 0.1
N := round((x2 - x1)/deltaX) = 120  # Количество точек
i := 0 .. N  # Индексы
X[i] := x1 + i*deltaX  # Значения по оси Ох
Y[i] := f(X[i])  # Значения по оси Оу
Z[i] := 1
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# График в мировых координатах
Xl := min(X) = -6
Xh := max(X) = 6  # Область отображения графика в МСК
Yl := min(Y) = -2.34521
Yh := max(Y) = 2.34521
Xlw := 100
Ylw := 200  # Область отображения в ОСК
Xhw := 800
Yhw := 900
M := stack(transpose(X), transpose(Y), transpose(Z)) = [
    -6, -5.9, -5.8, -5.7, -5.6, -5.5, -5.4, -5.3, -5.2, -5.1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;
    0, 0.7506, 1.41557, 1.9315, 2.25061, 2.34521, 2.21006, 1.8625, 1.34036, 0.697859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;
    1, 1, 1, 1, 1, 1, 1, 1, 1, 1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]  # Размещает матрицы друг над другом
deltaXw := Xhw - Xlw = 700
deltax := Xh - Xl = 12
deltaYw := Yhw - Ylw = 700
deltay := Yh - Yl = 4.69042
ky := deltaYw/deltay = 149.241
kx := deltaXw/deltax = 58.3333
Tsw := [kx, 0, Xlw - kx*Xl; 0, -ky, Yhw + ky*Yl; 0, 0, 1]
Mw := Tsw*M = [
    100, 105.833, 111.667, 117.5, 123.333, 129.167, 135, 140.833, 146.667, 152.5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;
    550, 437.98, 338.739, 261.742, 214.118, 200, 220.17, 272.04, 349.965, 445.851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;
    1, 1, 1, 1, 1, 1, 1, 1, 1, 1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]  # Получить все координаты в ОСК
# Получить все координаты по оси Ох | Получить все координаты по оси Оу
Xw := transpose(Mw)[:, 0] = [
    100; 105.833; 111.667; 117.5; 123.333; 129.167; 135; 140.833; 146.667; 152.5
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]
Yw := transpose(Mw)[:, 1] = [
    550; 437.98; 338.739; 261.742; 214.118; 200; 220.17; 272.04; 349.965; 445.851
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]
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