№1 - (-(-(-(-(-(-(-(-(-(-(-(-(-(-(-(-(-(-(-(-(-(-(-(-(-(-(-(-(-(-(-(-(-(-(-(-(-(-(-(-(-(-(-(-(-(-(-□)))))))))))))))))))))))))))))))))))))))))))))))
filename := "Piramida.txt"
filename1 := "Camera.txt"
PIR1 := READFILE(filename, "delimited")
PV1 := READFILE(filename1, "delimited")
# пирамида | камера
PIR1 = [
    "A", "B", "C", "D", "E", "F";
    0, 0, 3, 0, 0, 1;
    3, 0, 0, 1, 0, 0;
    0, 0, 0, 3, 3, 3;
    1, 1, 1, 1, 1, 1
]
PV1 = ["r=", 10; "fi=", 315; "theta=", 45]
# матрица координат пирамиды
PIR := submatrix(PIR1, 1, 4, 0, 5)
PIR = [0, 0, 3, 0, 0, 1; 3, 0, 0, 1, 0, 0; 0, 0, 0, 3, 3, 3; 1, 1, 1, 1, 1, 1]
PV := submatrix(PV1, 0, 2, 1, 1)
transpose(PV) = [10, 315, 45]  # матрица координат камеры в сферической СК
r_v := PV[0]  # радиус - расстояние от центра сферы
ϕ_v := PV[1]*π/180  # угол между осью Ox и отрезком, соединяющим начало координат с проекцией точки на плоскость Oxy
θ_v := PV[2]*π/180  # угол между радиусом и осью Oy
№2 - (-(-(-(-(-(-(-(-(-(-(-(-(-(-(-(-(-(-(-(-(-(-(-(-(-(-(-(-(-(-(-(-(-(-(-(-(-(-(-(-(-(-(-(-(-(-(-(-(-(-(-□)))))))))))))))))))))))))))))))))))))))))))))))))))
# Область отображения графика
x_LW := 200
y_LW := 100
x_RW := 700
y_RW := 500
# Матрица пересчета для перевода координат пирамиды в видовые - то есть как она будет видна с графика
K_view := [
    -sin(ϕ_v), cos(ϕ_v), 0, 0;
    -cos(θ_v)*cos(ϕ_v), -cos(θ_v)*sin(ϕ_v), sin(θ_v), 0;
    -sin(θ_v)*cos(ϕ_v), -sin(θ_v)*sin(ϕ_v), -cos(θ_v), r_v;
    0, 0, 0, 1
] = [0.707107, 0.707107, 0, 0; -0.5, 0.5, 0.707107, 0; -0.5, 0.5, -0.707107, 10; 0, 0, 0, 1]
# Переводим координаты пирамиды в видовую СК
PIR_V := K_view*PIR = [
    2.12132, 0, 2.12132, 0.707107, 0, 0.707107;
    1.5, 0, -1.5, 2.62132, 2.12132, 1.62132;
    11.5, 10, 8.5, 8.37868, 7.87868, 7.37868;
    1, 1, 1, 1, 1, 1
]
# Выделяем координаты вершин для отображения на графике
P_XY := stack(transpose(transpose(PIR_V)[:, 0]), transpose(transpose(PIR_V)[:, 1]), transpose(transpose(PIR_V)[:, 3])) = [
    2.12132, 0, 2.12132, 0.707107, 0, 0.707107;
    1.5, 0, -1.5, 2.62132, 2.12132, 1.62132;
    1, 1, 1, 1, 1, 1
]  # две координаты, потому что изображение плоское
# Определяем размеры проекции пирамиды на плоскость Oxy
x_L := min(transpose(P_XY)[:, 0])
y_H := max(transpose(P_XY)[:, 1])
# -левый верхний угол
x_L = 0
y_H = 2.62132
x_H := max(transpose(P_XY)[:, 0])
y_L := min(transpose(P_XY)[:, 1])
# -правый нижний
x_H = 2.12132
y_L = -1.5
# Параметры для матрицы пересчета
Δx_W := x_RW - x_LW
Δx_W = 500
Δx := x_H - x_L
Δx = 2.12132
Δy_W := y_RW - y_LW
Δy_W = 400
Δy := y_H - y_L
Δy = 4.12132
k_x := Δx_W/Δx
k_x = 235.702
k_y := Δy_W/Δy
k_y = 97.0563
# матрица пересчета из видовых в оконные
T_SW := [k_x, 0, x_LW - k_x*x_L; 0, -k_y, y_RW + k_y*y_L; 0, 0, 1] = [235.702, 0, 200; 0, -97.0563, 354.416; 0, 0, 1]
# Получили оконные координаты вершин пирамиды
M_W := T_SW*P_XY
M_W = [
    700, 200, 700, 366.667, 200, 366.667;
    208.831, 354.416, 500, 100, 148.528, 197.056;
    1, 1, 1, 1, 1, 1
]
[x_a, x_b, x_c, x_d, x_e, x_f; y_a, y_b, y_c, y_d, y_e, y_f; q, q, q, q, q, q] := vectorize(round(M_W)) = [700, 200, 700, 367, 200, 367; 209, 354, 500, 100, 149, 197; 1, 1, 1, 1, 1, 1]
округлили
X := transpose([x_a, x_b, x_c, x_a, x_d, x_e, x_b, x_e, x_f, x_c, x_f, x_d])  # координаты вершин для отображения на графике
Y := -transpose([y_a, y_b, y_c, y_a, y_d, y_e, y_b, y_e, y_f, y_c, y_f, y_d])
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№3 - (-(-(-(-(-(-(-(-(-(-(-(-(-(-(-(-(-(-(-(-(-(-(-(-(-(-(-(-(-(-(-(-(-(-(-(-(-(-(-(-(-(-(-(-(-(-(-(-(-(-□))))))))))))))))))))))))))))))))))))))))))))))))))
A := transpose([0, 3, 0, 1])
B := transpose([0, 0, 0, 1])
E := transpose([0, 0, 3, 1])
F := transpose([1, 0, 3, 1])
C := transpose([3, 0, 0, 1])
D := transpose([0, 1, 3, 1])
# Вычисляем декартовы координаты камеры (вектора,
# определяющего положение камеры)
R_C := [r_v*sin(θ_v)*cos(ϕ_v); r_v*sin(θ_v)*sin(ϕ_v); r_v*cos(θ_v)] = [5; -5; 7.07107]
AB := [B[0]; B[1]; B[2]] - [A[0]; A[1]; A[2]] = [0; -3; 0]
AC := [C[0]; C[1]; C[2]] - [A[0]; A[1]; A[2]] = [3; -3; 0]
N_ABC := AC×AB = [0; 0; -9]  # вектор нормали к грани ABC
AD := [D[0]; D[1]; D[2]] - [A[0]; A[1]; A[2]] = [0; -2; 3]
BC := [C[0]; C[1]; C[2]] - [B[0]; B[1]; B[2]] = [3; 0; 0]
DE := [E[0]; E[1]; E[2]] - [D[0]; D[1]; D[2]] = [0; -1; 0]
DF := [F[0]; F[1]; F[2]] - [D[0]; D[1]; D[2]] = [1; -1; 0]  # векторы граней
N_DFE := DE×DF = [0; 0; 1]
# Видимость грани ADEB
AD := [D[0]; D[1]; D[2]] - [A[0]; A[1]; A[2]] = [0; -2; 3]
AB := [B[0]; B[1]; B[2]] - [A[0]; A[1]; A[2]] = [0; -3; 0]
N_ADB := AB×AD = [-9; 0; 0]
q2 := R_C*N_ADB = -45
s2 := if(q2 ≥ 0, "Грань ADEB видима", "Грань ADEB невидима")
s2 = "Грань ADEB невидима"
# Видимость BEFC
BC := [B[0]; B[1]; B[2]] - [C[0]; C[1]; C[2]] = [-3; 0; 0]
BD := [D[0]; D[1]; D[2]] - [B[0]; B[1]; B[2]] = [0; 1; 3]
N_BDC := BD×BC = [0; -9; 3]
q3 := R_C*N_BDC = 66.2132
s3 := if(q3 ≥ 0, "Грань BEFC видима", "Грань BEFC невидима")
s3 = "Грань BEFC видима"
# Видимость ACFD
N_ADC := AD×AC = [9; 9; 6]
R_C = [5; -5; 7.07107]
q1 := R_C*N_ADC = 42.4264
s1 := if(q1 ≥ 0, "Грань ACFD видима", "Грань ACFD невидима")
s1 = "Грань ACFD видима"
# Определяем видимость грани ABC
q4 := R_C*N_ABC = -63.6396
s4 := if(q4 ≥ 0, "Грань ABC видима", "Грань ABC невидима")
s4 = "Грань ABC невидима"
# Определяем видимость грани DFE
q4 := R_C*N_DFE = 7.07107
s4 := if(q4 ≥ 0, "Грань DFE видима", "Грань DFE невидима")
s4 = "Грань DFE видима"
X := transpose([x_a, x_d, x_f, x_c, x_b, x_e, x_d, x_f, x_e, x_d, x_a, x_c])
Y := -transpose([y_a, y_d, y_f, y_c, y_b, y_e, y_d, y_f, y_e, y_d, y_a, y_c])
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№4 - (-(-(-(-(-(-(-(-(-(-(-(-(-(-(-(-(-(-(-(-(-(-(-(-(-(-(-(-(-(-(-(-(-(-(-(-(-(-(-(-(-(-(-(-(-(-(-(-(-(-(-(-(-(-(-(-(-(-(-(-(-(-□))))))))))))))))))))))))))))))))))))))))))))))))))))))))))))))
# Задаем положение секущей плоскости в МСК XYZ
# Вычисляем координаты вершин пирамиды в видовой системе координат (ВСК)
ψ_grad := 50  # -угол между осью z и вектором нормали к секущей плоскости
A := transpose([5, 0, 0, 1])
C := transpose([0, 5, 0, 1])
ψ := ψ_grad/180*π
ψ = 0.872665
B := transpose([0, 0, 0, 1])
D := transpose([0, 0, 10, 1])
N := transpose([0, sin(ψ), cos(ψ)]) = [0; 0.766044; 0.642788]  # - вектор нормали к секущей плоскости
PIR := augment(A, B, C, D) = [5, 0, 0, 0; 0, 0, 5, 0; 0, 0, 0, 10; 1, 1, 1, 1]
x_0 := 0
y_0 := 0
z_0 := 3/4*PIR[:, 3][2]
z_0 = 7.5
# Задаем параметры уравнения секущей плоскости
PIR_V := K_view*PIR = [3.53553, 0, 3.53553, 0; -2.5, 0, 2.5, 7.07107; 7.5, 10, 12.5, 2.92893; 1, 1, 1, 1]
[A; B; C] := N
[A; B; C] = [0; 0.766044; 0.642788]
D := -(A*x_0 + B*y_0 + C*z_0)
D = -4.82091
# Находим точку пересечения P1 секущей плоскости с ребром AD
[x1; y1; z1] := submatrix(PIR, 0, 2, 0, 0)
[x2; y2; z2] := submatrix(PIR, 0, 2, 3, 3)
Δx := x2 - x1
Δy := y2 - y1
Δz := z2 - z1
x1 = 5
t_AD := -((A*x1 + B*y1 + C*z1 + D)/(A*Δx + B*Δy + C*Δz))
x2 = 0
x_AD := x1 + Δx*t_AD
y_AD := y1 + Δy*t_AD
z_AD := z1 + Δz*t_AD
x_AD = 1.25
y_AD = 0
z_AD = 7.5
# Находим точку пересечения P1 секущей плоскости с ребром CD
V1 := submatrix(PIR, 0, 2, 2, 2)
V2 := submatrix(PIR, 0, 2, 3, 3)
transpose(V1) = [0, 5, 0]
transpose(V2) = [0, 0, 10]
ΔV := V2 - V1
ΔV = [0; -5; 10]
t_CD := -((N*V1 + D)/(N*ΔV))
V_CD := V1 + ΔV*t_CD
V_CD = [0; 3.09312; 3.81377]
x_CD := V_CD[0]
y_CD := V_CD[1]
z_CD := V_CD[2]
x_CD = 0
y_CD = 3.09312
z_CD = 3.81377
# Находим точку пересечения P1 секущей плоскости с ребром BD
V1 := submatrix(PIR, 0, 2, 1, 1)
V2 := submatrix(PIR, 0, 2, 3, 3)
transpose(V1) = [0, 0, 0]
transpose(V2) = [0, 0, 10]
ΔV := V2 - V1
ΔV = [0; 0; 10]
t_BD := -((N*V1 + D)/(N*ΔV))
V_BD := V1 + ΔV*t_BD
V_BD = [0; 0; 7.5]
x_BD := V_BD[0]
y_BD := V_BD[1]
z_BD := V_BD[2]
x_BD = 0
y_BD = 0
z_BD = 7.5
# Получаем матрицу мировых коорднат точек P1, P2, P3
TR := [x_AD, x_CD, x_BD; y_AD, y_CD, y_BD; z_AD, z_CD, z_BD; 1, 1, 1] = [1.25, 0, 0; 0, 3.09312, 0; 7.5, 3.81377, 7.5; 1, 1, 1]
TR_V := K_view*TR = [0.883883, 2.18716, 0; 4.6783, 4.2433, 5.3033; 4.0717, 8.84982, 4.6967; 1, 1, 1]
P_XY := stack(transpose(transpose(PIR_V)[:, 0]), transpose(transpose(PIR_V)[:, 1]), transpose(transpose(PIR_V)[:, 3])) = [3.53553, 0, 3.53553, 0; -2.5, 0, 2.5, 7.07107; 1, 1, 1, 1]
TR_XY := stack(transpose(transpose(TR_V)[:, 0]), transpose(transpose(TR_V)[:, 1]), transpose(transpose(TR_V)[:, 3])) = [0.883883, 2.18716, 0; 4.6783, 4.2433, 5.3033; 1, 1, 1]
x_LW := 100
y_LW := 200
x_HW := 800
y_HW := 900
# – матрица пересчета из ВСК в ОК
T_SW := [k_x, 0, x_LW - k_x*x_L; 0, -k_y, y_HW + k_y*y_L; 0, 0, 1] = [235.702, 0, 100; 0, -97.0563, 754.416; 0, 0, 1]
# Вычисляем оконные координаты вершин
# треугольника сечения Р1, Р2, Р3
TR_W := T_SW*TR_XY
[x_p1, x_p2, x_p3; y_p1, y_p2, y_p3; q, q, q] := vectorize(round(TR_W)) = [308, 616, 100; 300, 343, 240; 1, 1, 1]
M_W := T_SW*P_XY
[x_a, x_b, x_c, x_d; y_a, y_b, y_c, y_d; q, q, q, q] := vectorize(round(M_W))
# Формируем массивы координат Х и У для рисования
# сечеия пирамиды
XC := transpose([x_p1, x_p2, x_p3, x_p1])
YC := -transpose([y_p1, y_p2, y_p3, y_p1])
# Формируем массивы координат X и Y для рисования пирамиды
X := transpose([x_a, x_b, x_c, x_a, x_d, x_b, x_d, x_c])
Y := -transpose([y_a, y_b, y_c, y_a, y_d, y_b, y_d, y_c])
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